# Задание 1
x := 2
n := 4
y := (sqrt(x^3 + n) + cos(|n*x - 1|)^2)/(nthroot(x^5 + sin(x) + n, 4)*cos((x + n)*π/4))
y = -8.90634e15
# Задание 2
x := 7
y := 10
z := -3
# p := if x > y,  (sin(x) + 3*abs(y)) - z^2,
# ( (y+3)/sqrt(z^2+1) )*ln(abs(x+1))
# q := if (x > y) AND (x < 1), cos(x) + 2*abs(y+1) - z,
# ( (x*y+3) / sqrt(y^2+5) )
# w := if (x < y) OR (y >= 10), x^2 + 2*(y*x+1) - z,
# ( (x^(-3)*y^2 + 3) * sqrt(z^2+7))
# x := 7
# y := 10
# z := -3
