# Координаты вершин пирамиды A, B, C, A1, B1, C1
P := [3, 0, 0, 1, 0, 0; 0, 0, 3, 0, 0, 1; 0, 0, 0, 3, 3, 3; 1, 1, 1, 1, 1, 1]
# Параметры положения камеры
PC := [10; 315; 45]
# Сферические координаты точки наблюдения
r_v := PC[0]
ϕ_v := PC[1]*π/180
θ_v := PC[2]*π/180
# Задаём облать отображения графика в окне Windows
x_LW := 200
y_LW := 100
x_HW := 700
y_HW := 500
# Формируем матрицу пересчёта мировых координат в видовые
K_view := [
    -sin(ϕ_v), cos(ϕ_v), 0, 0;
    -cos(θ_v)*cos(ϕ_v), -cos(θ_v)*sin(ϕ_v), sin(θ_v), 0;
    -sin(θ_v)*cos(ϕ_v), -sin(θ_v)*sin(ϕ_v), -cos(θ_v), r_v;
    0, 0, 0, 1
]
# Вычисляем координаты вершин пирамиды в ВСК
PIR_V := K_view*P
# Определяем координаты проекции вершин пирамиды на картинную плоскость
P_XY := stack(transpose(transpose(PIR_V)[:, 0]), transpose(transpose(PIR_V)[:, 1]), transpose(transpose(PIR_V)[:, 3]))
# Определяем габаритную область проекции пирамиды на плоскость XY ВСК - картинную плоскость
# Левый верхний угол
x_L := min(transpose(P_XY)[:, 0])
y_H := max(transpose(P_XY)[:, 1])
x_L = 0
y_H = 2.62132
# Правый нижний угол
x_H := max(transpose(P_XY)[:, 0])
y_L := min(transpose(P_XY)[:, 1])
x_H = 2.12132
y_H = 2.62132
# Вычисляем параметры, необходимые для формирования матрицы пересчета координат из плоскости XY ВСК в ОСК
Δx := x_H - x_L
Δy := y_H - y_L
Δx_W := x_HW - x_LW
Δy_W := y_HW - y_LW
k_x := Δx_W/Δx
k_y := Δy_W/Δy
# Матрица пересчета из ВСК в ОСК
T_SW := [k_x, 0, x_LW - k_x*x_L; 0, -k_y, y_HW + k_y*y_L; 0, 0, 1]
# Вычисляем координаты вершин пирамиды в ОСК
M_W := T_SW*P_XY
[x_a, x_b, x_c, x_a1, x_b1, x_c1; y_a, y_b, y_c, y_a1, y_b1, y_c1; q, q, q, q, q, q] := vectorize(round(M_W))
# Формируем массивы координат X и Y для рисования пирамиды
X := transpose([x_c, x_b, x_a, x_c, x_c1, x_b1, x_b, x_b1, x_a1, x_a, x_a1, x_c1])
Y := transpose([y_c, y_b, y_a, y_c, y_c1, y_b1, y_b, y_b1, y_a1, y_a, y_a1, y_c1])
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# Построение усечённой пирамиды без невидимых граней
A := P[:, 0]
A = [3; 0; 0; 1]
B := P[:, 1]
B = [0; 0; 0; 1]
C := P[:, 2]
C = [0; 3; 0; 1]
A1 := P[:, 3]
A1 = [1; 0; 3; 1]
B1 := P[:, 4]
B1 = [0; 0; 3; 1]
C1 := P[:, 5]
C1 = [0; 1; 3; 1]
# Вычисляем декартовы координаты камеры (вектора, определяющего положение камеры)
R_C := [r_v*sin(θ_v)*cos(ϕ_v); r_v*sin(θ_v)*sin(ϕ_v); r_v*cos(θ_v)]
# Вычиляем декартовы координаты вектора внешней нормали к каждой грани пирамиды (x, y, z):
AC := [C[0]; C[1]; C[2]] - [A[0]; A[1]; A[2]]
AA1 := [A1[0]; A1[1]; A1[2]] - [A[0]; A[1]; A[2]]
N_AA1C1C := AC×AA1
A1B1 := [B1[0]; B1[1]; B1[2]] - [A1[0]; A1[1]; A1[2]]
A1C1 := [C1[0]; C1[1]; C1[2]] - [A1[0]; A1[1]; A1[2]]
N_A1B1C1 := A1C1×A1B1
AB := [B[0]; B[1]; B[2]] - [A[0]; A[1]; A[2]]
AC := [C[0]; C[1]; C[2]] - [A[0]; A[1]; A[2]]
N_ABC := AB×AC
N_AA1B1B := AA1×AB
BB1 := [B1[0]; B1[1]; B1[2]] - [B[0]; B[1]; B[2]]
BC := [C[0]; C[1]; C[2]] - [B[0]; B[1]; B[2]]
N_BB1C1C := BB1×BC
# Определяем видимость граней пирамиды:
q1 := N_AA1C1C*R_C
s1 := if(q1 ≥ 0, "Грань AA1C1C видна", "Грань AA1C1C не видна")
s1 = "Грань AA1C1C видна"
q2 := N_AA1B1B*R_C
s2 := if(q2 ≥ 0, "Грань AA1B1B видна", "Грань AA1B1B не видна")
s2 = "Грань AA1B1B видна"
q3 := N_BB1C1C*R_C
s3 := if(q3 ≥ 0, "Грань BB1C1C видна", "Грань BB1C1C не видна")
s3 = "Грань BB1C1C не видна"
q4 := N_ABC*R_C = -63.6396
s4 := if(q4 ≥ 0, "Грань ABC видна", "Грань ABC не видна")
s4 = "Грань ABC не видна"
q5 := N_A1B1C1*R_C = 7.07107
s5 := if(q5 ≥ 0, "Грань A1B1C1 видна", "Грань A1B1C1 не видна")
s5 = "Грань A1B1C1 видна"
# Определяем порядок обхода вершин для рисования видимых граней
Xs := transpose([x_a, x_a1, x_c1, x_c, x_a, x_a1, x_b1, x_b, x_a, x_a1, x_b1, x_c1])
Ys := transpose([y_a, y_a1, y_c1, y_c, y_a, y_a1, y_b1, y_b, y_a, y_a1, y_b1, y_c1])
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# построение сечения пирамиды плоскостью с невидимыми гранями
P := [3, 0, 0, 1, 0, 0; 0, 0, 3, 0, 0, 1; 0, 0, 0, 3, 3, 3; 1, 1, 1, 1, 1, 1]
coords := [3, 0, 0, 1, 0, 0; 0, 0, 3, 0, 0, 1; 0, 0, 0, 3, 3, 3]
# Угол между осью z и вектором нормали к секущей плоскости
ϕ_grad := 0
ϕ := ϕ_grad/180*π
# Вектор нормали к секущей плоскости
N := transpose([0, sin(ϕ), cos(ϕ)])
# Координаты точки пересечения оси Z и секущей плоскости
x_0 := 0
y_0 := 0
z_0 := 2
# Задаем параметры уравнения секущей плоскости
D := -(N[0]*x_0 + N[1]*y_0 + N[2]*z_0)
# Находим точку пересечения P1 секущей плоскости с ребром AA1
V1 := coords[:, 0]
V2 := coords[:, 3]
ΔV := V2 - V1
t_AD := -((N*V1 + D)/(N*ΔV))
V_AD := V1 + ΔV*t_AD
# координаты точки P1
x_AD := V_AD[0]
y_AD := V_AD[1]
z_AD := V_AD[2]
# Находим точку пересечения P2 секущей плоскости с ребром BB1
V1 := coords[:, 1]
V2 := coords[:, 4]
ΔV := V2 - V1
t_BD := -((N*V1 + D)/(N*ΔV))
V_BD := V1 + ΔV*t_BD
# координаты точки P2
x_BD := V_BD[0]
y_BD := V_BD[1]
z_BD := V_BD[2]
# Находим точку пересечения P3 секущей плоскости с ребром CC1
V1 := coords[:, 2]
V2 := coords[:, 5]
ΔV := V2 - V1
t_CD := -((N*V1 + D)/(N*ΔV))
V_CD := V1 + ΔV*t_CD
# координаты точки P3
x_CD := V_CD[0]
y_CD := V_CD[1]
z_CD := V_CD[2]
# Матрица мировых коорднат точек P1, P2, P3 (сечение)
TR := [x_CD, x_AD, x_BD; y_CD, y_AD, y_BD; z_CD, z_AD, z_BD; 1, 1, 1]
# Формируем матрицу пересчёта мировых координат в видовые
K_view := [
    -sin(ϕ_v), cos(ϕ_v), 0, 0;
    -cos(θ_v)*cos(ϕ_v), -cos(θ_v)*sin(ϕ_v), sin(θ_v), 0;
    -sin(θ_v)*cos(ϕ_v), -sin(θ_v)*sin(ϕ_v), -cos(θ_v), r_v;
    0, 0, 0, 1
]
# Вычисляем координаты вершин пирамиды в ВСК
PIR_V := K_view*P
# Вычисляем координаты вершин треугольника сечения Р1, Р2, Р3 в ВСК
TR_V := K_view*TR
# Определяем координаты проекции вершин пирамиды на картинную плоскость
P_XY := stack(transpose(transpose(PIR_V)[:, 0]), transpose(transpose(PIR_V)[:, 1]), transpose(transpose(PIR_V)[:, 3]))
# Определяем координаты проекции вершин треугольника сечения Р1, Р2, Р3
TR_XY := stack(transpose(transpose(TR_V)[:, 0]), transpose(transpose(TR_V)[:, 1]), transpose(transpose(TR_V)[:, 3]))
# Определяем область проекции пирамиды на картинную плоскость XY ВСК
# Левый верхний угол
x_L := min(transpose(P_XY)[:, 0])
y_H := max(transpose(P_XY)[:, 1])
x_L = 0
y_H = 2.62132
# Правый нижний угол
x_H := max(transpose(P_XY)[:, 0])
y_L := min(transpose(P_XY)[:, 1])
x_H = 2.12132
y_L = -1.5
# Вычисляем параметры для формирования матрицы пересчета координат из плоскости XY ВСК в ОСК
Δx_W := x_HW - x_LW
Δx := x_H - x_L
Δy_W := y_HW - y_LW
Δy := y_H - y_L
k_x := Δx_W/Δx
k_y := Δy_W/Δy
# Матрица пересчета из ВСК в ОСК
T_SW := [k_x, 0, x_LW - k_x*x_L; 0, -k_y, y_HW + k_y*y_L; 0, 0, 1]
# Вычисляем координаты вершин пирамиды в ОСК
M_W := T_SW*P_XY
[x_a, x_b, x_c, x_a1, x_b1, x_c1; y_a, y_b, y_c, y_a1, y_b1, y_c1; q, q, q, q, q, q] := vectorize(round(M_W))
# Вычисляем оконные координаты вершин треугольника сечения Р1, Р2, Р3
TR_W := T_SW*TR_XY
[x_p1, x_p2, x_p3; y_p1, y_p2, y_p3; q, q, q] := vectorize(round(TR_W))
# Формируем массивы координат X и Y для рисования пирамиды
X := transpose([x_c, x_b, x_a, x_c, x_c1, x_b1, x_b, x_b1, x_a1, x_a, x_a1, x_c1])
Y := transpose([y_c, y_b, y_a, y_c, y_c1, y_b1, y_b, y_b1, y_a1, y_a, y_a1, y_c1])
# Массивы координат сечения:
XC := transpose([x_p1, x_p2, x_p3, x_p1])
YC := transpose([y_p1, y_p2, y_p3, y_p1])
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