# Задание 1
x := 2
n := 4
y := (sqrt(x^3 + n) + cos(|n*x - 1|)^2)/(nthroot(x^5 + sin(x) + n, 4)*cos((x + n)*π/4))
y = -8.90634e15
# Задание 2
x := 7
y := 10
z := -3
p := if(x > y, sin(x) + 3*|y| - z^2, (y + 3)*ln(|x + 1|)/sqrt(z^2 + 1))
p = 8.5485
q := if(x > y and x < 1, cos(x) + 2*|y + 1| - z, (x*y + 3)/sqrt(y^2 + 5))
q = 7.12407
w := if((x < y) or y ≥ 10, x^2 + 2*(y*x + 1) - z, x^-3*y^2 + 3*sqrt(z^2 + 7))
w = 194
# Задание 3
x := -2, -1.6 .. 2
n := 4
f(x) := (x^2 - n*x + sin(x))*sqrt(|x - cos(n*x)|)
x = [-2; -1.6; -1.2; -0.8; -0.4; 0; 0.4; 0.8; 1.2; 1.6; 2]
f(x) = [15.1033; 12.819; 6.02284; 1.39052; 0.834594; 0; -0.688271; -2.47099; -2.5609; -2.21264; -4.52711]
# Задание 4
n := 9
a := -3*n
a = -27
b := 3*n
b = 27
vecA := runif(3, a, b)
vecA = [-26.9315; -16.5606; 4.59033]
vecB := runif(3, a, b)
vecB = [-8.08336; 17.4332; -17.597]
vecC := runif(3, a, b)
vecC = [11.3668; -10.5848; -22.0638]
s := vecA*vecB
V := vecB×vecC
w := (vecA×vecB)*vecC
s = -151.783
w = 21124.5
V = [-570.904; -378.371; -112.599]
Вручную
iter1 := 0 .. 2
s := sum(vecA[iter1]*vecB[iter1], iter1)
V := [
    (vecB[1]*vecC[2]) - (vecB[2]*vecC[1]);
    (vecB[2]*vecC[0]) - (vecB[0]*vecC[2]);
    (vecB[0]*vecC[1]) - (vecB[1]*vecC[0])
]
s = -151.783
V = [-570.904; -378.371; -112.599]
W := [
    (vecA[1]*vecB[2]) - (vecA[2]*vecB[1]);
    (vecA[2]*vecB[0]) - (vecA[0]*vecB[2]);
    (vecA[0]*vecB[1]) - (vecA[1]*vecB[0])
]
W = [211.392; -511.02; -603.368]
w := sum(W[iter1]*vecC[iter1], iter1) = 21124.5
# Наибольшая длина
lengthA := sqrt(vecA[0]^2 + vecA[1]^2 + vecA[2]^2)
lengthB := sqrt(vecB[0]^2 + vecB[1]^2 + vecB[2]^2)
lengthC := sqrt(vecC[0]^2 + vecC[1]^2 + vecC[2]^2)
arr := [lengthA; lengthB; lengthC]
arr = [31.9473; 26.056; 26.9824]
Max := max(arr) = 31.9473
# Ответ : это А
iter1 := 0, 1 .. 10
iter2 := 0, 1 .. 10
M[iter1, iter2] := -10 + round(rnd(20), 3)
M[iter1, iter2] := -10 + floor(rnd(20))
M = [
    8, 4, 3, -4, -4, -8, 7, -7, -9, 2, 0;
    -2, -1, -7, 4, 6, 7, -4, -8, 5, 2, -9;
    3, -8, -6, 8, 3, -1, -1, 0, 3, 2, -10;
    -8, 7, 4, -3, 1, 9, -7, -8, 9, -10, -9;
    -8, 7, 4, -10, 4, -6, -7, -4, -3, 6, 0;
    5, -8, -2, -8, -9, 1, 0, -4, 6, -5, 7;
    4, -3, -6, -6, 0, -9, 0, -9, 7, -8, 8;
    -10, -4, -3, 8, 0, 3, -5, 0, -3, 1, 3;
    -2, -10, 2, 1, -6, -10, -9, 7, 6, 3, 0;
    -8, 4, -10, 2, -9, 8, -5, 9, -5, -3, -6;
    -6, 8, 8, -9, -7, 5, -6, -10, -8, -4, -10
]
sum(sum(M[iter1, iter2], iter2), iter1) = -183
Mpos[iter1, iter2] := if(M[iter1, iter2] > 0, M[iter1, iter2], 0)
sum(sum(Mpos[iter1, iter2], iter2), iter1) = 234  # Сумма положительных элементов матрицы
Mneg[iter1, iter2] := if(M[iter1, iter2] < 0, M[iter1, iter2], 0)
sum(sum(Mneg[iter1, iter2], iter2), iter1) = -417  # Сумма отрицательных элементов матрицы
X := M[:, 0]
Y := transpose(transpose(M)[:, 10])
Y = [-6, 8, 8, -9, -7, 5, -6, -10, -8, -4, -10]
X = [8; -2; 3; -8; -8; 5; 4; -10; -2; -8; -6]
Y*X = 297
# Задание 5
func5(x5) := e^(-(|x5|/3))*cos(x5)
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# Задание 6
x6 := -9, -8.75 .. 9
func6(x6) := if(x6 < 0, e^x6*x6, e^(-x6)*x6^3)
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# Задание 7
x7start := -2*π
dif := π/4
dif = 0.785398
ind := 0, 1 .. 16
x7[ind] := x7start + dif*ind
g7(x7) := sqrt(|x7|)*sin(x7)
g7(x7) = [0; 2.8164; 3.983; 2.8164; 0; -2.8164; -3.983; -2.8164; 0; 2.8164; 3.983; 2.8164; 0; -2.8164; -3.983; -2.8164; 0]
x7 = [-6.28319; -5.49779; -4.71239; -3.92699; -3.14159; -2.35619; -1.5708; -0.785398; 0; 0.785398; 1.5708; 2.35619; 3.14159; 3.92699; 4.71239; 5.49779; 6.28319]
Y := g7(x7)
X := x7
WRITEPRN("X.txt") := X
WRITEPRN("Y.txt") := g7(x7)
XX := READPRN("X.txt")
YY := READPRN("Y.txt")
YY = [0; 2.816; 3.983; 2.816; 0; -2.816; -3.983; -2.816; 0; 2.816; 3.983; 2.816; 0; -2.816; -3.983; -2.816; 0]
XX = [-6.283; -5.498; -4.712; -3.927; -3.142; -2.356; -1.571; -0.7854; 0; 0.7854; 1.571; 2.356; 3.142; 3.927; 4.712; 5.498; 6.283]
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# Задание 8
x8 := -3, -3 + 0.01 .. 3
q8(x8) := e^(-x8^2)
q82(x8) := d/dx8(q8(x8))
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# Задание 9
i9 := 0 .. 42
j9 := 0 .. 42
x9[i9] := -15 + (30/42)*i9
y9[j9] := -15 + (30/42)*j9
func9(x91, y91) := sin(sqrt(x91^2 + y91^2))/sqrt(x91^2 + y91^2)
graph[i9, j9] := func9(x9[i9], y9[j9])
# [component: inputs graph]
# Задание 10
x10 := -5, -4.99 .. 5
func10(x10) := x10^2 + (x10 - 2)*sin(x10) - 5
x := -2
root(func10(x), x) = -1.32936
x := 2
root(func10(x), x) = 2.19967
func10(-1.32936) = -8.23152e-6
func10(2.19966) = -3.15517e-5
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# Задание 11
x11 := -4, 3.99 .. 4
func11(x11) := x11^2 + x11*sin(2*x11) - (x11 - 5)*cos(x11)
root(func11(x11), x11, -4, -2.4) = -2.97354
root(func11(x11), x11, -2.4, 0) = -1.93283
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func11(-2.9735) = -0.00033958
func11(-1.932) = 0.00542766
# Задание 12
n12 := 1
func12(x12) := x12^3 + (4 - n12)*x12^2 + (3 - 4*n12)*x12 - 3*n12
Vc12 := [-3*n12; 3 - 4*n12; 4 - n12; 1]
X12 := polyroots(Vc12)
X12 = [-3; -1; 1]
# Задание 13
M13 := [n, n + 1, n + 2; n - 3, n - 2, n; n - 1, n, n + 1]
M113 := [6*n + 8; 6*n - 7; 6*n + 2]
[ans113; ans213; ans313] := M13^-1*M113
ans113 = 1
ans213 = 2
ans313 = 3
Given
n*x13 + (n + 1)*y13 + (n + 2)*z13 == 6*n + 8
x13 := 0
(n - 3)*x13 + (n - 2)*y13 + z13*n == 6*n - 7
y13 := 0
(n - 1)*x13 + n*y13 + (n + 1)*z13 == 6*n + 2
z13 := 0
res := Find(x13, y13, z13)
res = [1; 2; 3]
# Задание 14
t := 0, 0 + 0.0001 .. 2*π
ellipseX(t) := 9*sin(t)
ellipseY(t) := 4*cos(t)
circleX(t) := 9 + 5*sin(t)
circleY(t) := 2 + 5*cos(t)
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f(x14, y14) := (x14^2/81 + y14^2/16)
g(x14, y14) := (x14 - 9)^2 + (y14 - 2)^2
Given
x14 := 5
y14 := 4
f(x14, y14) == 1
g(x14, y14) == 25
res := Find(x14, y14)
res = [4.23934; 3.52845]
x14 := 4
y14 := -1
Given
f(x14, y14) == 1
g(x14, y14) == 25
res := Find(x14, y14)
res = [6.9308; -2.55175]
# Задание 15
func15(x15) := x15*sin(x15)
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x15 := 5
x15 := Minimize(func15, x15)
x15 = 4.91318
func15(x15) = -4.81447
func15(10) = -5.44021
