# Задание 1
Xa := -2
Ya := -4
Xb := -3
Yb := 0
Xlw := 100
Xc := 0
Yc := 4
Xhw := 400
Xd := 3
Yd := 0
Ylw := 200
Xe := 2
Ye := -4
Yhw := 500
Xf := -2
Yf := 0
Xg := 2
Yg := 0
Zx := transpose([Xa, Xb, Xc, Xd, Xe, Xf, Xg])
Zy := transpose([Ya, Yb, Yc, Yd, Ye, Yf, Yg])
Xl := min(Zx) = -3
Xh := max(Zx) = 3
Yh := max(Zy) = 4
Yl := min(Zy) = -4
qXw := Xhw - Xlw = 300
qX := Xh - Xl = 6
qYw := Yhw - Ylw = 300
qY := Yh - Yl = 8
Kx := qXw/qX = 50
Ky := qYw/qY = 37.5
# Матрица пересчетов
Tsw := [Kx, 0, Xlw - Kx*Xl; 0, Ky, Yhw + Ky*Yl; 0, 0, 1] = [50, 0, 250; 0, 37.5, 350; 0, 0, 1]
[Xaw; Yaw; q] := Tsw*[Xa; Ya; 1] = [150; 200; 1]
[Xbw; Ybw; q] := Tsw*[Xb; Yb; 1] = [100; 350; 1]
[Xcw; Ycw; q] := Tsw*[Xc; Yc; 1] = [250; 500; 1]
[Xdw; Ydw; q] := Tsw*[Xd; Yd; 1] = [400; 350; 1]
[Xew; Yew; q] := Tsw*[Xe; Ye; 1] = [350; 200; 1]
[Xfw; Yfw; q] := Tsw*[Xf; Yf; 1] = [150; 350; 1]
[Xgw; Ygw; q] := Tsw*[Xg; Yg; 1] = [350; 350; 1]
Y := transpose([Yb, Yc, Yd, Yb, Yf, Ya, Ye, Yg, Yd])
Yw := transpose([Ybw, Ycw, Ydw, Ybw, Yfw, Yaw, Yew, Ygw, Ydw])
X := transpose([Xb, Xc, Xd, Xb, Xf, Xa, Xe, Xg, Xd])
Xw := transpose([Xbw, Xcw, Xdw, Xbw, Xfw, Xaw, Xew, Xgw, Xdw])
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# Задание 2
f(x) := sqrt(|x|)*sin(π*x)
x1 := -6
x2 := 6
Δx := 0.1
Xlw := 100
Ylw := 200
Xhw := 800
Yhx := 900
N := (x2 - x1)/Δx = 120
i := 0, 1 .. 120
X[i] := x1 + i*Δx
Y[i] := f(X[i])
Z[i] := 1
Yl := min(Y) = -2.34521
Xl := -6
Yh := max(Y) = 2.34521
Xh := 6
ΔXw := 700
ΔX := 12
ΔYw := 700
ΔY := 4.69
ky := ΔYw/ΔY = 149.254
kx := ΔXw/ΔX = 58.3333
Tsw := [kx, 0, Xlw - kx*Xl; 0, ky, Yhw + ky*Yl; 0, 0, 1] = [58.3333, 0, 450; 0, 149.254, 149.969; 0, 0, 1]
M := stack(transpose(X), transpose(Y), transpose(Z))
Mw := Tsw*M = [
    100, 105.833, 111.667, 117.5, 123.333, 129.167, 135, 140.833, 146.667, 152.5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;
    149.969, 261.999, 361.249, 438.253, 485.881, 500, 479.828, 427.954, 350.022, 254.127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;
    1, 1, 1, 1, 1, 1, 1, 1, 1, 1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]
Xw := transpose(Mw)[:, 0] = [
    100; 105.833; 111.667; 117.5; 123.333; 129.167; 135; 140.833; 146.667; 152.5
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]
Yw := transpose(Mw)[:, 1] = [
    149.969; 261.999; 361.249; 438.253; 485.881; 500; 479.828; 427.954; 350.022; 254.127
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]
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